// COMSOL Multiphysics 5.5.0.292 model "lab2.mph"
// Outline of the model tree

Parameters
  L = 1.5
  H = 1
  De = 8*10^(-3)/(10^(-2))^3*9.81
  d = 0.12
  E = 2*10^5/(10^(-3))^2
  P1 = 30000
  alpha = 11*10^-6
  n = 30

Geometry
  geom1 "Geometry 1" (2D, length unit m)
    pol1: Polygon | source = table; table = {{-H/2, 0}, {H/2, 0}, {0, -L}}
    pol2: Polygon | type = open; source = table; table = {{-0.25005, -0.74985}, {0.25014, -0.74958}}
    coi1: Coincident | entity1 = pol2(1) points 1; entity2 = pol1(1) boundaries 3
    coi2: Coincident | entity1 = pol2(1) points 2; entity2 = pol1(1) boundaries 2
    fin: Finalize "Form Union"

Materials
  mat1: Common "Material 1"
    def "Basic"
      thermalexpansioncoefficient = alpha
      density = De
      youngsmodulus = E
  mat2: Common "Material 1" on all domains
    def "Basic"
      thermalexpansioncoefficient = alpha
      density = De
      youngsmodulus = 2*10^5/(10^(-3))^2
      poissonsratio = .271
      thermalconductivity = 36
      heatcapacity = 510.7896

Physics
  solid: SolidMechanics on all domains
    dependent variable u = {u, v, w}
    d.d = 1[m]
    StructuralTransientBehavior.StructuralTransientBehavior = Quasistatic
    lemm1: LinearElasticModel "Linear Elastic Material 1" (default) | ForceLinearStrainRes = 1
    free1: Free (default)
    init1: init "Initial Values 1" (default)
    gr1: Gravity on domains 1, 2
    fix1: Fixed "Fixed Constraint 1" on boundaries 2
    bndl1: BoundaryLoad on boundaries 4 | LoadType = TotalForce; Ftot = {0, -P1, 0}
    ct1: ChangeThickness on domains 1, 2 | d = d
  ht: HeatTransfer "Heat Transfer in Solids" on all domains
    dependent variable T
    ShapeProperty.order_temperature = 1
    PhysicalModelProperty.dz = 1[m]
    solid1: SolidHeatTransferModel "Solid 1" (default)
    init1: init "Initial Values 1" (default) | Tinit = 293.15[K]
    ins1: ThermalInsulation (default)
    temp1: TemperatureBoundary "Temperature 1" on boundaries 1-3, 5, 6 | T0 = 418.15[K]

Multiphysics
  te1: ThermalExpansion on all domains | Heat_physics = ht; Solid_physics = solid

Mesh
  mesh1 "Mallanormalu" (physics-controlled)
    size: MeshSizeDefault | hauto = 3

Studies
  std1 "Study 1"
    stat: Stationary

Solver configurations
  sol1 "Solution 1" (study std1)
    v1: Variables "Dependent Variables 1"
    s1: Stationary "Stationary Solver 1"
      fc1: FullyCoupled | linsolver = d1; initstep = 0.01; minstep = 1.0E-6; maxiter = 50
      d1: Direct "Direct, Heat Transfer Variables ht (te1) (merged)" | pivotperturb = 1.0E-13

Datasets
  dset1: Solution | solution = sol1

Plots
  pg1: PlotGroup2D "Stress (solid)" | data = dset1
    surf1: Surface | expr = solid.sp1Gp; unit = N/m^2; descr = First principal stress, Gauss point evaluation
      def: Deform "Deformation" | expr = {u+X, v+Y}
  pg2: PlotGroup2D "Volume Loads (solid)" | data = dset1; typeintitle = off; descriptionintitle = off; unitintitle = off
    arws1: ArrowSurface "Gravity 1" | expr = {solid.gr1.F_Vx, solid.gr1.F_Vy}
      col: Color "Color Expression" | expr = comp1.solid.gr1.F_V_Mag
      def: Deform "Deformation" | expr = {u, v}; descr = Displacement field
    surf1: Surface "Gray Surfaces" (disabled) | expr = 1
      def: Deform "Deformation" | expr = {u, v}; descr = Displacement field
  pg3: PlotGroup2D "Boundary Loads (solid)" | data = dset1; typeintitle = off; descriptionintitle = off; unitintitle = off
    arwl1: ArrowLine "Boundary Load 1" | expr = {solid.bndl1.F_Ax, solid.bndl1.F_Ay}
      col: Color "Color Expression" | expr = comp1.solid.bndl1.F_A_Mag
      def: Deform "Deformation" | expr = {u, v}; descr = Displacement field
    surf1: Surface "Gray Surfaces" (disabled) | expr = 1
      def: Deform "Deformation" | expr = {u, v}; descr = Displacement field
  pg4: PlotGroup2D "Temperature (ht)" | data = dset1
    surf1: Surface | expr = T
  pg5: PlotGroup2D "Isothermal Contours (ht)" | data = dset1
    con1: Contour | expr = T; levelrounding = off