// COMSOL Multiphysics 5.5.0.292 model "Lab4.mph"
// Outline of the model tree

Parameters
  l = 0.6
  b = 0.5
  E = 2.1*10^11
  Pam = 12000/2
  Pbxm = 8000*sin(pi*60/180)/2
  Pbym = 8000*cos(pi*60/180)/2
  Ar = pi*(0.05)^2/4
  A = 0.75*tan(pi*30/180)
  C = 0.75
  B = 0.5

Geometry
  geom1 "Geometry 1" (3D, length unit m)
    pt1: Point "N1"
    pt2: Point "N2" | p = {3*C, , }
    pt3: Point "N3" | p = {, B, }
    pt4: Point "N4" | p = {3*C, B, }
    pt5: Point "N5" | p = {C, , }
    pt6: Point "N6" | p = {C*2, , }
    pt7: Point "N7" | p = {C, B, }
    pt8: Point "N8" | p = {C*2, B, }
    pt9: Point "N9" | p = {C, , -A}
    pt10: Point "N10" | p = {2*C, , -A}
    pt11: Point "N11" | p = {C, B, -A}
    pt12: Point "N12" | p = {2*C, B, -A}
    ls1: LineSegment "E1" | vertex1 = pt1(1) points 1; vertex2 = pt5(1) points 1
    ls2: LineSegment "E2" | vertex1 = ls1(1) points 2; vertex2 = pt6(1) points 1
    ls3: LineSegment "E3" | vertex1 = ls2(1) points 2; vertex2 = pt2(1) points 1
    ls4: LineSegment "E4" | vertex1 = pt3(1) points 1; vertex2 = pt7(1) points 1
    ls5: LineSegment "E5" | vertex1 = ls4(1) points 2; vertex2 = pt8(1) points 1
    ls6: LineSegment "E6" | vertex1 = ls5(1) points 2; vertex2 = pt4(1) points 1
    ls7: LineSegment "E7" | vertex1 = ls2(1) points 1; vertex2 = ls5(1) points 1
    ls8: LineSegment "E8" | vertex1 = ls3(1) points 1; vertex2 = ls6(1) points 1
    ls9: LineSegment "E9" | vertex1 = ls1(1) points 1; vertex2 = ls7(1) points 2
    ls10: LineSegment "E10" | vertex1 = ls9(1) points 2; vertex2 = ls8(1) points 1
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    fin: Finalize "Form Union"

Materials
  mat1: Common "LabFEM"
    def "Basic"
      youngsmodulus = 2.1*10^11
  mat2: Common "LabFEM" on all edges
    def "Basic"
      youngsmodulus = 2.1*10^11
      density = 780
      poissonsratio = 102.4*10^6

Physics
  truss: Truss on all edges
    dependent variable u = {u, v, w}
    emm1: Elastic "Linear Elastic Material 1" (default)
    csd1: CrossSectionBeam "Cross Section Data 1" (default) | area = Ar[m^2]
    sec1: StraightEdgeConstraint (default)
    free1: Free (default)
    init1: init "Initial Values 1" (default)
    pl1: PointLoad "Pa" on points 3, 5 | Fp = {0, 0, -Pam}
    pl2: PointLoad "Pb" on points 7, 9 | Fp = {Pbxm, 0, -Pbym}
    disp1: Displacement0 "Prescribed Displacement 1" on points 1, 2 | Notation = StandardNotation; Direction = {1, 1, 1}
    disp2: Displacement0 "Prescribed Displacement 2" on points 11, 12 | Direction = {0, 0, 1}

Mesh
  mesh1 "Mesh 1" (physics-controlled)
    size: MeshSizeDefault | hauto = 4

Studies
  std1 "Study 1"
    stat: Stationary

Solver configurations
  sol1 "Solution 1" (study std1)
    v1: Variables "Dependent Variables 1"
    s1: Stationary "Stationary Solver 1"
      dDef: Direct
      fc1: FullyCoupled | linsolver = dDef

Datasets
  dset1: Solution | solution = sol1

Plots
  pg1: PlotGroup3D "Force (truss)" | data = dset1
    line1: Line | expr = truss.Nxl; radiusexpr = truss.re; tuberadiusscale = 0.25
      def: Deform "Deformation" | expr = {u, v, w}; descr = Displacement field
  pg2: PlotGroup3D "Stress (truss)" | data = dset1
    line1: Line | expr = truss.sn; radiusexpr = truss.re; tuberadiusscale = 0.25
      def: Deform "Deformation" | expr = {u, v, w}; descr = Displacement field
  pg3: PlotGroup3D "Point Loads (truss)" | data = dset1; typeintitle = off; descriptionintitle = off; unitintitle = off
    arpt1: ArrowPoint "Point Load 1" | expr = {truss.pl1.F_Px, truss.pl1.F_Py, truss.pl1.F_Pz}
      col: Color "Color Expression" | expr = comp1.truss.pl1.F_P_Mag
      def: Deform "Deformation" | expr = {u, v, w}; descr = Displacement field
    arpt2: ArrowPoint "Point Load 2" | expr = {truss.pl2.F_Px, truss.pl2.F_Py, truss.pl2.F_Pz}
      col: Color "Color Expression" | expr = comp1.truss.pl2.F_P_Mag
      def: Deform "Deformation" | expr = {u, v, w}; descr = Displacement field