// COMSOL Multiphysics 5.5.0.292 model "lab6.mph"
// Outline of the model tree

Parameters
  H = 1.2
  E = 3.2*10^5*10^6
  Pa = 5400
  Pb = 4000
  Pc = 2500
  Pe = 3000
  D = 50*10^-3[m]
  A = (pi*D^2)/4
  I = 0.25*pi*(D/2)^4

Coordinate systems
  sys1: Boundary "Boundary System 1"

Geometry
  geom1 "Geometry 1" (2D, length unit m)
    pol1: Polygon | type = open; source = table; table = {{0, 0}, {-H, 0}, {-2*H, 0}, {-H, -H}, {-H, 0}}
    pol2: Polygon | source = table; table = {{0, 0}, {0, -H}, {-H, -H}, {0, 0}}
    coi1: Coincident | entity1 = pol2(1) points 1; entity2 = pol1(1) points 1
    coi2: Coincident | entity1 = pol2(1) points 3; entity2 = pol1(1) points 4
    fin: Finalize "Form Union"

Materials
  mat1: Common "Material 1" on all boundaries
    def "Basic"
      thermalexpansioncoefficient = alpha
      density = De
      youngsmodulus = 3.2*10^5*10^6
      poissonsratio = 0.211

Physics
  truss: Truss on boundaries 1-7
    dependent variable u = {u, v, w}
    emm1: Elastic "Linear Elastic Material 1" (default)
    csd1: CrossSectionBeam "Cross Section Data 1" (default) | area = A[m^2]
    sec1: StraightEdgeConstraint (default)
    free1: Free (default)
    init1: init "Initial Values 1" (default)
    pl1: PointLoad on points 1 | Fp = {-Pa, -Pb, 0}
    pl2: PointLoad on points 3 | Fp = {0, -Pe, 0}
    pl3: PointLoad on points 2 | Fp = {0, -Pc, 0}
    disp1: Displacement0 "Prescribed Displacement 1" on points 4, 5 | Notation = StandardNotation; Direction = {1, 1, 0}
  beam: HermitianBeam (disabled) on all boundaries
    dependent variable u2 = {u2, v2, w2}
    emm1: Elastic "Linear Elastic Material 1" (default)
    csd1: CrossSectionBeam "Cross Section Data 1" (default) | area = A; Izz = I
    free1: Free (default)
    init1: init "Initial Values 1" (default)
    pl1: PointLoad on points 1 | Fp = {-Pa, -Pb, 0}
    pl2: PointLoad on points 3 | Fp = {0, -Pe, 0}
    pl3: PointLoad on points 2 | Fp = {0, -Pc, 0}
    pdr1: DispRot0 "Prescribed Displacement/Rotation 1" on points 4, 5 | Direction = {1, 1, 0}; DirectionRot = {1, 0, 0}

Mesh
  mesh1 "Mesh 1"
    edg1: Edge on boundaries 1-7

Studies
  std1 "Study 1"
    stat: Stationary

Solver configurations
  sol1 "Solution 1" (study std1)
    v1: Variables "Dependent Variables 1"
    s1: Stationary "Stationary Solver 1"
      dDef: Direct
      fc1: FullyCoupled | linsolver = dDef

Datasets
  dset1: Solution | solution = sol1

Plots
  pg1: PlotGroup2D "Force (truss)" | data = dset1
    line1: Line | expr = truss.Nxl; radiusexpr = truss.re
      def: Deform "Deformation" | expr = {u, v}; descr = Displacement field
  pg2: PlotGroup2D "Stress (truss)" | data = dset1
    line1: Line | expr = truss.sn; linetype = tube; radiusexpr = truss.re
      def: Deform "Deformation" | expr = {u, v}; descr = Displacement field
  pg3: PlotGroup2D "Point Loads (truss)" | data = dset1; typeintitle = off; descriptionintitle = off; unitintitle = off
    arpt1: ArrowPoint "Point Load 1" | expr = {truss.pl1.F_Px, truss.pl1.F_Py}
      col: Color "Color Expression" | expr = comp1.truss.pl1.F_P_Mag
      def: Deform "Deformation" | expr = {u, v}; descr = Displacement field
    arpt2: ArrowPoint "Point Load 2" | expr = {truss.pl2.F_Px, truss.pl2.F_Py}
      col: Color "Color Expression" | expr = comp1.truss.pl2.F_P_Mag
      def: Deform "Deformation" | expr = {u, v}; descr = Displacement field
    arpt3: ArrowPoint "Point Load 3" | expr = {truss.pl3.F_Px, truss.pl3.F_Py}
      col: Color "Color Expression" | expr = comp1.truss.pl3.F_P_Mag
      def: Deform "Deformation" | expr = {u, v}; descr = Displacement field
  pg4: PlotGroup1D "1D Plot Group 4" | data = dset1